// COMSOL Multiphysics 6.0.0.405 model "coupled.mph"
// Coupled hydrogen diffusion and deformation in a single crystal using UMAT
// S. Lucarini, E. Martinez-Paneda. UMAT4COMSOL: An Abaqus user material (UMAT) subroutine
// wrapper for COMSOL. Advances in Engineering Software. 2024.
// Outline of the model tree

Parameters
  b0 = 0.01 [mm]  // Initial crack opening
  R = 150 [mm]  // Boundary Layer outer radius
  D = 1.27e-08 [m^2 / s]  // Diffusion coefficient
  C0 = C0at/N_A  // Initial hydrogen concentration
  T = 300 [K]  // Temperature
  Sy = 250 [MPa]  // Yield stress
  V_H = 2e-06 [m^3/mol]  // Partial molar volume
  N_L = N_Lat/N_A  // Number of lattice sites
  K = exp(Eb/(R_const*T))  // Equilibrium constant
  E = 207 [GPa]  // Young's modulus
  nu = 0.3  // Poisson's ratio
  N = 0.2  // Strain hardening exponent
  K_I = 89.2 [MPa]  // Remote load
  Time = 130 [s]  // Computation time
  t = 100[s]
  N_A = 6.022E23 [1/mol]
  N_Lat = 5.1E29 [1/m^3]
  C0at = 2.084E21 [1/m^3]
  Eb = 60 [kJ/mol]

Variables
  var1 "Variables 1"
    N_Tat = 10^(23.26-2.33*exp(-5.5*extmat1.state.elast121)) [1/m^3]  // Trap density
    C_T = N_T*K*c/(K*c+N_L)  // Trap concentration
    theta_T = C_T/N_T  // Trap occupancy
    r = sqrt(X^2+Y^2)  // Polar coordinate 1
    theta = atan2(y,x)  // Polar coordinate 2
    N_T = N_Tat/N_A

Geometry
  geom1 "Geometry 1" (2D, length unit m)
    c2: Circle | r = b0/2; angle = 90
    c1: Circle | r = b0; angle = 90
    dif1: Difference | input = c1; input2 = c2
    sq1: Square | pos = {-b0/2, b0/2}; size = b0/2
    b1: BezierPolygon "Bézier Polygon 1" | p = {{b0, R/3}, {0, 0}}; degree = 1; w = {1, 1}
    b2: BezierPolygon "Bézier Polygon 2" | p = {{R/3, R/3}, {0, R/3}}; degree = 1; w = {1, 1}
    b3: BezierPolygon "Bézier Polygon 3" | p = {{R/3, 0}, {R/3, R/3}}; degree = 1; w = {1, 1}
    b4: BezierPolygon "Bézier Polygon 4" | p = {{0, 0}, {R/3, b0}}; degree = 1; w = {1, 1}
    pc1: ParametricCurve | parname = theta; parmax = pi/4; coord = {b0*cos(theta), b0*sin(theta)}
    b5: BezierPolygon "Bézier Polygon 5"
      p = {{R/3, 7.0710678118655E-6}, {R/3, 7.0710678118655E-6}}
      degree = 1
      w = {1, 1}
    pc2: ParametricCurve | parname = theta; parmin = pi/4; parmax = pi/2; coord = {b0*cos(theta), b0*sin(theta)}
    csol1: ConvertToSolid "LowerRightTriangle" | input = b1, b2, b5, pc1
    b6: BezierPolygon "Bézier Polygon 6"
      p = {{R/3, 7.0710678118655E-6}, {R/3, 7.0710678118655E-6}}
      degree = 1
      w = {1, 1}
    csol2: ConvertToSolid "UpperRightTriangle" | input = b3, b4, b6, pc2
    b7: BezierPolygon "Bézier Polygon 7" | p = {{-b0/2, -R/3}, {b0/2, b0/2}}; degree = 1; w = {1, 1}
    b8: BezierPolygon "Bézier Polygon 8" | p = {{-R/3, -R/3}, {b0/2, R/3}}; degree = 1; w = {1, 1}
    b9: BezierPolygon "Bézier Polygon 9" | p = {{-R/3, -b0/2}, {R/3, b0}}; degree = 1; w = {1, 1}
    b11: BezierPolygon "Bézier Polygon 11" | p = {{-b0/2, -b0/2}, {b0/2, b0}}; degree = 1; w = {1, 1}
    csol3: ConvertToSolid "LowerLeftTriangle" | input = b11, b7, b8, b9
    b10: BezierPolygon "Bézier Polygon 10" | p = {{-R/3, -b0/2}, {R/3, b0}}; degree = 1; w = {1, 1}
    b12: BezierPolygon "Bézier Polygon 12" | p = {{-R/3, 0}, {R/3, R/3}}; degree = 1; w = {1, 1}
    b13: BezierPolygon "Bézier Polygon 13" | p = {{0, 0}, {R/3, b0}}; degree = 1; w = {1, 1}
    b14: BezierPolygon "Bézier Polygon 14" | p = {{0, -b0/2}, {b0, b0}}; degree = 1; w = {1, 1}
    csol4: ConvertToSolid "UpperLeftTriangle" | input = b10, b12, b13, b14
    b15: BezierPolygon "Right rectangle"
      p = {{R/3, R/3, 0, 0, R/3}, {R/3, R/3+R/10, R/3+R/10, R/3, R/3}}
      degree = {1, 1, 1, 1}
      w = {1, 1, 1, 1, 1, 1, 1, 1}
    b16: BezierPolygon "Left rectangle"
      p = {{-R/3, 0, 0, -R/3, -R/3}, {R/3, R/3, R/3+R/10, R/3+R/10, R/3}}
      degree = {1, 1, 1, 1}
      w = {1, 1, 1, 1, 1, 1, 1, 1}
    b18: BezierPolygon "Bottom arc (i)"
      p = {{-R/3, 0, R/3}, {R/3+R/10, R/3+R/10+R/5, R/3+R/10}}
      degree = 2
      w = {1, 0.707106781187, 1}
    b19: BezierPolygon "Bézier Polygon 19" | p = {{R/3, R}, {0, 0}}; degree = 1; w = {1, 1}
    pc3: ParametricCurve | parname = theta; parmax = pi/9; coord = {R*cos(theta), R*sin(theta)}
    b20: BezierPolygon "Bézier Polygon 20" | p = {{R/3, R*cos(pi/9)}, {R/3, R*sin(pi/9)}}; degree = 1; w = {1, 1}
    b21: BezierPolygon "Bézier Polygon 21" | p = {{R/3, R/3}, {0, R/3}}; degree = 1; w = {1, 1}
    csol5: ConvertToSolid "BottomFarRight" | input = b19, b20, b21, pc3
    pc4: ParametricCurve | parname = theta; parmin = pi/9; parmax = pi/6; coord = {R*cos(theta), R*sin(theta)}
    b22: BezierPolygon "Bézier Polygon 22" | p = {{R*cos(pi/6), R/3}, {R*sin(pi/6), R/3+R/10}}; degree = 1; w = {1, 1}
    b23: BezierPolygon "Bézier Polygon 23" | p = {{R/3, R/3}, {R/3+R/10, R/3}}; degree = 1; w = {1, 1}
    b24: BezierPolygon "Bézier Polygon 24" | p = {{R/3, R*cos(pi/9)}, {R/3, R*sin(pi/9)}}; degree = 1; w = {1, 1}
    csol6: ConvertToSolid "TopFarRight" | input = csol5, b22, b23, pc4
    pc5: ParametricCurve | parname = theta; parmin = pi/6; parmax = pi-pi/6; coord = {R*cos(theta), R*sin(theta)}
    b25: BezierPolygon "Bézier Polygon 25"
      p = {{R*cos(pi-pi/6), -R/3}, {R*sin(pi-pi/6), R/3+R/10}}
      degree = 1
      w = {1, 1}
    b26: BezierPolygon "Bézier Polygon 26" | p = {{R*cos(pi/6), R/3}, {R*sin(pi/6), R/3+R/10}}; degree = 1; w = {1, 1}
    b27: BezierPolygon "Bottom arc (ii)"
      p = {{-R/3, 0, R/3}, {R/3+R/10, R/3+R/10+R/5, R/3+R/10}}
      degree = 2
      w = {1, 0.707106781187, 1}
    csol7: ConvertToSolid "Top arc" | input = b25, b26, b27, pc5
    pc7: ParametricCurve | parname = theta; parmin = pi-pi/6; parmax = pi-pi/9; coord = {R*cos(theta), R*sin(theta)}
    b31: BezierPolygon "Bézier Polygon 31" | p = {{R*cos(pi/6), R/3}, {R*sin(pi/6), R/3+R/10}}; degree = 1; w = {1, 1}
    b32: BezierPolygon "Bézier Polygon 32" | p = {{-R/3, -R/3}, {R/3+R/10, R/3}}; degree = 1; w = {1, 1}
    b33: BezierPolygon "Bézier Polygon 33" | p = {{R*cos(pi-pi/9), -R/3}, {R*sin(pi-pi/9), R/3}}; degree = 1; w = {1, 1}
    csol8: ConvertToSolid "TopFarLeft" | input = csol7, b32, b33, pc7
    b28: BezierPolygon "Bézier Polygon 28"
      p = {{R*cos(pi-pi/6), -R/3}, {R*sin(pi-pi/6), R/3+R/10}}
      degree = 1
      w = {1, 1}
    b29: BezierPolygon "Bézier Polygon 29" | p = {{-R/3, -R/3}, {R/3, b0/2}}; degree = 1; w = {1, 1}
    b30: BezierPolygon "Bézier Polygon 30" | p = {{-R/3, -sqrt(R^2-(b0/2)^2)}, {b0/2, b0/2}}; degree = 1; w = {1, 1}
    pc6: ParametricCurve
      parname = theta
      parmin = pi-pi/9
      parmax = pi-asin(b0/(2*R))
      coord = {R*cos(theta), R*sin(theta)}
    csol9: ConvertToSolid | input = b29, b30, csol8, pc6
    fin: Finalize "Form Union"

Materials
  mat1: Common "Material 1" on all domains
    def "Basic"
      density = 7870
    ElastoplasticModel "Elastoplastic material model"
      sigmags = Sy
      sigmagh = sig_h(epe)
      Hillcoefficients = {0, 0, 0, 0, 0, 0}
      ys = {0, 0, 0, 0, 0, 0}
      an1: Analytic | funcname = sig_h; expr = Sy*(1+E*epe/Sy)^N-Sy; args = epe; fununit = Pa; argunit = 1
  extmat1: External "External Material 1"
    comcomsolgeneralStressDeformation "General stress-deformation relation"
      par = {168400000000., 121400000000., 75400000000., 0., 0., 0., 0., 0., 0., 0.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}

Physics
  solid: SolidMechanics on all domains
    dependent variable u = {u, v, w}
    ShapeProperty.order_displacement = 3
    Type2D.Type2D = PlaneStrain
    StructuralTransientBehavior.StructuralTransientBehavior = Quasistatic
    lemm1: LinearElasticModel "Linear Elastic Material 1" (default) | E_mat = userdef; E = E; nu_mat = userdef; nu = nu
      plsty1: Plasticity (disabled) on all domains
        PlasticStrainModel = LargePlasticStrains
        sigmags_mat = userdef
        sigmags = Sy
        Et_mat = userdef
        Et = 1000
        sigmagh_mat = from_mat
        IsotropicHardening = UseHardeningFunctionData
        HardeningModel = Isotropic
    free1: Free (default)
    init1: init "Initial Values 1" (default)
    disp1: Displacement1 "ConstrainedDisp" on boundaries 18, 20, 22 | Direction = {0, 1, 0}
    disp2: Displacement1 "BoundaryLayer" on boundaries 29-31, 33, 34
      Direction = {1, 1, 0}
      U0 = {K_I*(1+nu)/E*sqrt(r/(2*pi))*cos(theta/2)*(3-4*nu-cos(theta))*t/Time, K_I*(1+nu)/E*sqrt(r/(2*pi))*sin(theta/2)*(3-4*nu-cos(theta))*t/Time, 0}
    weak1: WeakContribution on all domains
      integrationOrder = 4
      quadratureFrame = spatial
      weakExpression = (Sh-nojac(-solid.pmGp))*test(Sh)
      automaticQuadrature = 1
      aux1: AuxiliaryField "Auxiliary Dependent Variable 1" on all domains
        fieldVariableName = Sh
        shapeFunctionType = shdisc
        order = 3
        frame = material
    essr1: ExternalStressStrainRelation on domains 1-14 | material = extmat1
  tds: DilutedSpecies "Transport of Diluted Species" on all domains
    dependent variable c
    ShapeProperty.order_concentration = 2
    EquationForm.form = Automatic
    AdvancedSettings.ConvectiveTerm = cons
    TransportMechanism.Convection = 1
    cdm1: ConvectionDiffusionMigration "Transport Properties 1" (default)
      u_src = userdef
      u = {D*V_H/(R_const*T)*d(Sh,x), D*V_H/(R_const*T)*d(Sh,y), 0}
      DiffusionCoefficientSource = mat
      DiffusionMaterialList = none
      minput_temperature = T
      Dchem_c = D
      D_c2 = D
    nflx1: NoFlux (default)
    init1: init "Initial Values 1" (default) | initc = C0
    conc1: Concentration on boundaries 1, 5, 11, 27 | species = 1; c0 = C0
    reac1: Reactions on domains 1-14 | R_c = -C_T*(1-theta_T)/c*ct

Mesh
  mesh1 "Mesh 1"
    map1: Map "Mapped 1" on domains 1-6, 8-14
      dis1: Distribution "12elements" on boundaries 4, 8-10, 12, 16, 17, 21, 28, 29, 32, 34 | numelem = 12
      dis2: Distribution "24elements" on boundaries 26, 27, 31 | numelem = 24
      dis3: Distribution "4elements" on boundaries 6, 15, 23, 30, 33
      dis4: Distribution "BiasedOuterLeft" on boundaries 1-3 | type = predefined; elemratio = 2
      dis5: Distribution "BiasedOuterRight" on boundaries 22, 24, 25 | type = predefined; reverse = on; elemratio = 2
      dis6: Distribution "BiasedIntermediateLeft" on boundaries 5, 7, 14
        type = predefined
        elemcount = 120
        elemratio = 10000
        method = geometric
      dis7: Distribution "BiasedIntermediateRight" on boundaries 19, 20
        type = predefined
        elemcount = 120
        elemratio = 10000
        method = geometric
    fq1: FreeQuad on no domains

Studies
  std1 "Study 1 (All physics interfaces)"
    time: Transient "Time Dependent" | tlist = range(0,1,130); usertol = on; rtol = 0.0001

Solver configurations
  sol1 "Solution 1" (study std1)
    v1: Variables "Dependent Variables 1"
      comp1_c: Field "Concentration (comp1.c)" | scalemethod = manual; scaleval = 1e-3
      comp1_Sh: Field "Auxiliary dependent variable Sh (comp1.Sh)" | scalemethod = manual; scaleval = 1.0e8
      comp1_u: Field "Displacement field (comp1.u)" | scalemethod = manual; scaleval = 1e-6
    t1: Time "Time-Dependent Solver 1" | tlist = range(0,1,130); maxstepbdf = 1
      dDef: Direct
      se1: Segregated | segterm = iter
        ssDef: SegregatedStep
          segvar = {comp1_u}
          subdtech = auto
          subjtech = once
          subtermconst = tol
          maxsubiter = 25
          subntolfact = 1
        ss1: SegregatedStep | segvar = {comp1_Sh}
        ss2: SegregatedStep | segvar = {comp1_c}; subtermconst = tol; maxsubiter = 4; subntolfact = 1
        solid1: SegregatedStep "Segregated Step 1a"

Datasets
  dset1: Solution | solution = sol1

Plots
  pg1: PlotGroup2D "Stress (solid)" | data = dset1
    surf1: Surface | expr = solid.misesGp
      def: Deform "Deformation" | expr = {u, v}; descr = Displacement field (material and geometry frames)
  pg2: PlotGroup2D "Hydrostatic stress" | data = dset1
    surf1: Surface | expr = Sh
  pg6: PlotGroup2D "Concentration 2D" | data = dset1
    surf1: Surface | expr = c/C0
  pg5: PlotGroup1D "Concentration 1D" | data = dset1
    lngr1: LineGraph on boundaries 18, 20 | expr = c/C0