// COMSOL Multiphysics 6.0.0.405 model "crystalplasticity.mph"
// Crystal Plasticity polycrystal using UMAT
// S. Lucarini, E. Martinez-Paneda. UMAT4COMSOL: An Abaqus user material (UMAT) subroutine
// wrapper for COMSOL. Advances in Engineering Software. 2024.
// Outline of the model tree
// Unit system: mpa

Parameters
  wMax = avgStrain*1[mm]  // Max displacement of the symmetric half
  strainRate = 0.1[1/s]  // Strain rate
  tFinal = avgStrain/strainRate  // End time
  avgStrain = 0.04  // Average strain
  param = 0[s]
  tstep = tFinal/40

Geometry
  geom3 "Geometry 3" (3D, length unit mm)

Materials
  extmat2: External "External Material 1.1"
    def "Basic"
      density = 0
    comcomsolgeneralStressDeformation "General stress-deformation relation"
      par = {168400., 121400., 75400., 0., 0., 0., 0., 0., 0., 0.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}
  extmat3: External "External Material 1.1.1"
    // same settings as extmat2
  extmat4: External "External Material 1.1.1.1"
    // same settings as extmat2
  extmat5: External "External Material 1.1.1.1.1"
    // same settings as extmat2
  extmat6: External "External Material 1.1.1.1.1.1"
    // same settings as extmat2
  extmat7: External "External Material 1.1.1.1.1.1.1"
    // same settings as extmat2
  extmat8: External "External Material 1.1.1.1.1.1.1.1"
    // same settings as extmat2
  extmat9: External "External Material 1.1.1.1.1.1.1.1.1"
    // same settings as extmat2
  extmat10: External "External Material 1.1.1.1.1.1.1.1.1.1"
    // same settings as extmat2
  extmat11: External "External Material 1.1.1.1.1.1.1.1.1.1.1"
    // same settings as extmat2
  extmat12: External "External Material 1.1.1.1.1.1.1.1.1.1.1.1"
    // same settings as extmat2

Physics
  solid: SolidMechanics on all domains
    dependent variable u = {u, v, w}
    ShapeProperty.order_displacement = 2
    StructuralTransientBehavior.StructuralTransientBehavior = Quasistatic
    lemm1: LinearElasticModel "Linear Elastic Material 1" (default)
      E_mat = userdef
      E = 200e9
      nu_mat = userdef
      nu = 0.3
      reducedIntegration = 1
      hourglassStabilization = none
    free1: Free (default)
    init1: init "Initial Values 1" (default)
    disp1: Displacement2 "Prescribed Displacement 1" on boundaries 3, 19, 36, 56 | Direction = {0, 0, 1}
    disp2: Displacement2 "Prescribed Displacement 2" on boundaries 10, 17, 34, 42, 44
      Direction = {0, 0, 1}
      U0 = {0, 0, wMax*param/tFinal}
    disp3: Displacement0 "Prescribed Displacement 3" on points 1 | Direction = {1, 1, 1}
    disp4: Displacement0 "Prescribed Displacement 4" on points 10 | Direction = {1, 0, 1}
    disp6: Displacement2 "Prescribed Displacement 6" (disabled) on no boundaries | Direction = {0, 1, 0}
    disp7: Displacement2 "Prescribed Displacement 7" (disabled) on no boundaries
      Direction = {0, 1, 0}
      U0 = {0, -wMax*t/tFinal/2, 0}
    disp8: Displacement2 "Prescribed Displacement 8" (disabled) on no boundaries | Direction = {1, 0, 0}
    disp9: Displacement2 "Prescribed Displacement 9" (disabled) on no boundaries
      Direction = {1, 0, 0}
      U0 = {-wMax*t/tFinal/2, 0, 0}
    essr1: ExternalStressStrainRelation on domains 1
      material = extmat3
      reducedIntegration = 1
      hourglassStabilization = none
    essr2: ExternalStressStrainRelation on domains 2
      material = extmat2
      reducedIntegration = 1
      hourglassStabilization = none
    essr3: ExternalStressStrainRelation on domains 3
      material = extmat8
      reducedIntegration = 1
      hourglassStabilization = none
    essr4: ExternalStressStrainRelation on domains 4
      material = extmat4
      reducedIntegration = 1
      hourglassStabilization = none
    essr5: ExternalStressStrainRelation on domains 5
      material = extmat6
      reducedIntegration = 1
      hourglassStabilization = none
    essr6: ExternalStressStrainRelation on domains 6
      material = extmat5
      reducedIntegration = 1
      hourglassStabilization = none
    essr7: ExternalStressStrainRelation on domains 7
      material = extmat11
      reducedIntegration = 1
      hourglassStabilization = none
    essr8: ExternalStressStrainRelation on domains 8
      material = extmat7
      reducedIntegration = 1
      hourglassStabilization = none
    essr9: ExternalStressStrainRelation on domains 9
      material = extmat9
      reducedIntegration = 1
      hourglassStabilization = none
    essr10: ExternalStressStrainRelation on domains 10
      material = extmat10
      reducedIntegration = 1
      hourglassStabilization = none

Mesh
  mesh1 "Mesh 1"
    imp1: Import | source = nastran; filename = poly10_22.bdf
    fin: Finalize

Studies
  std1 "Study 1"
    stat: Stationary | useparam = on; pname = param; plistarr = range(0,tFinal,tFinal); punit = s

Solver configurations
  sol1 "Solution 1" (study std1)
    v1: Variables "Dependent Variables 1"
    s1: Stationary "Stationary Solver 1"
      p1: Parametric
        paramtuning = on
        pinitstep = tstep
        pminstep = tstep
        pmaxstep = tstep
        porder = linear
        pout = psteps
      fc1: FullyCoupled | linsolver = d1; dtech = const
      d1: Direct "Suggested Direct Solver (solid)" | linsolver = pardiso; pivotperturb = 1.0E-9; nliniterrefine = on