*Heading
** Job name: Elastoplastic Model name: Elastoplastic
** Generated by: Sergio Luarini
*Preprint, echo=NO, model=NO, history=NO, contact=NO
**
** PARTS
**
*Part, name=PART-1
*Node
      1,           0.,          10.
      2,           0.,        9.375
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*Element, type=CPS6
  1,    3,    1,    2,  474,  395,  475
  2,    3,    4,    1,  476,  403,  474
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*Elset, elset=SET-1, generate
   1,  693,    1
*Elset, elset=SET-2, generate
   1,  693,    1
*Nset, nset=Set-3
 353,
** Section: Section-1-SET-2
*Solid Section, elset=SET-2, material=MATERIAL-1_UMAT
10.,
*End Part
**
**
** ASSEMBLY
**
*Assembly, name=Assembly
**
*Instance, name=PART-1-1, part=PART-1
*End Instance
**
*Nset, nset=SET-1, instance=PART-1-1
 237, 260, 281, 298, 315, 328
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*Nset, nset=SET-2, instance=PART-1-1
   1,   2,   5,   6,   7,  11
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*Elset, elset=_SURF-1_S2, internal, instance=PART-1-1
 570, 597, 620, 640, 693
*Elset, elset=_SURF-1_S3, internal, instance=PART-1-1
 657, 671, 681, 688
*Elset, elset=_SURF-1_S2_1, internal, instance=PART-1-1
 570, 597, 620, 640, 693
*Elset, elset=_SURF-1_S3_1, internal, instance=PART-1-1
 657, 671, 681, 688
*Surface, type=ELEMENT, name=SURF-1
_SURF-1_S2_1, S2
_SURF-1_S3_1, S3
*End Assembly
**
** MATERIALS
**
*Material, name=MATERIAL-1
*Elastic
70000., 0.2
*Plastic
 243.,0.
2414.,1.
*Material, name=MATERIAL-1_UMAT
*Depvar
    7
*User Material, constants=4
70000.,  0.2, 243.,2171.
**
** BOUNDARY CONDITIONS
**
** Name: Disp-BC-1 Type: Symmetry/Antisymmetry/Encastre
*Boundary
SET-1, YSYMM
** Name: Disp-BC-2 Type: Symmetry/Antisymmetry/Encastre
*Boundary
SET-2, XSYMM
** ----------------------------------------------------------------
**
** STEP: Step-1
**
*Step, name=Step-1, nlgeom=NO
*Static
0.05, 1.1, 1.1e-05, 0.05
**
** LOADS
**
** Name: SURFFORCE-1   Type: Pressure
*Dsload
SURF-1, P, -133.65
**
** OUTPUT REQUESTS
**
*Restart, write, frequency=0
**
** FIELD OUTPUT: F-Output-1
**
*Output, field
*Node Output
CF, RF, U
*Element Output, directions=YES
LE, PE, PEEQ, PEMAG, S, SDV
*Contact Output
CDISP, CSTRESS
**
** HISTORY OUTPUT: H-Output-1
**
*Output, history
*Node Output, nset=PART-1-1.Set-3
U1,
*NODE PRINT, nset=PART-1-1.Set-3
U1
*End Step
