// COMSOL Multiphysics 6.0.0.405 model "neohookean.mph"
// Twisting of NeoHookean cube
// S. Lucarini, E. Martinez-Paneda. UMAT4COMSOL: An Abaqus user material (UMAT) subroutine
// wrapper for COMSOL. Advances in Engineering Software. 2024.
// Outline of the model tree

Parameters
  wMax = avgStrain*1.0  // Max displacement of the symmetric half
  strainRate = 1.0  // Strain rate
  tFinal = avgStrain/strainRate  // End time
  avgStrain = 1.0  // Average strain
  tstep = tFinal/10.0
  para = 0.0

Geometry
  geom3 "Geometry 3" (3D, length unit m)

Materials
  extmat2: External "External Material 1.1"
    def "Basic"
      density = 0
    comcomsolgeneralStressDeformation "General stress-deformation relation"
      par = {1.0, 0.3, meshelement, x, y, z}

Physics
  solid: SolidMechanics on all domains
    dependent variable u = {u, v, w}
    ShapeProperty.order_displacement = 2
    EquationForm.form = Stationary
    StructuralTransientBehavior.StructuralTransientBehavior = Quasistatic
    lemm1: LinearElasticModel "Linear Elastic Material 1" (default)
      E_mat = userdef
      E = 1
      nu_mat = userdef
      nu = 0.3
      rho_mat = userdef
      rho = 0
      ForceLinearStrainRes = 0
      reducedIntegration = 1
      hourglassStabilization = automatic
    free1: Free (default)
    init1: init "Initial Values 1" (default)
    disp1: Displacement2 "Prescribed Displacement 1" on boundaries 1 | Notation = StandardNotation; Direction = {1, 1, 1}
    disp2: Displacement2 "Prescribed Displacement 2" on boundaries 6
      Direction = {1, 1, 1}
      U0 = {0, (Y-0.5)*cos(para/tFinal*pi/6)-(Z-0.5)*sin(para/tFinal*pi/6)+0.5-Y, (Y-0.5)*sin(para/tFinal*pi/6)+(Z-0.5)*cos(para/tFinal*pi/6)+0.5-Z}
    essr1: ExternalStressStrainRelation on domains 1
      material = extmat2
      reducedIntegration = 1
      hourglassStabilization = automatic

Mesh
  mesh4 "Mesh 4"
    imp1: Import
      source = nastran
      filename = D:\paper_comsol\neohook\meshcom.bdf
      sequence = none
      domelemsequence = off
      unmesheddom = on
      facepartition = detectfaces
      data = mesh
    fin: Finalize

Studies
  std1 "Study 1"
    stat: Stationary
      mesh = {geom3, mesh4}
      errestandadap = none
      errestim = goalerrest
      selection = sum
      meshadaptmethod = modify
      useparam = on
      pname = para
      plistarr = range(0,tFinal,tFinal)

Solver configurations
  sol1 "Solution 1" (study std1)
    v1: Variables "Dependent Variables 1"
    s1: Stationary "Stationary Solver 1"
      p1: Parametric
        paramtuning = on
        pinitstep = tstep
        pminstep = tstep
        pmaxstep = tstep
        porder = linear
        pout = psteps
      fc1: FullyCoupled | linsolver = d1; dtech = const
      d1: Direct "Suggested Direct Solver (solid)" | linsolver = pardiso; pivotperturb = 1.0E-9; nliniterrefine = on

Datasets
  dset1: Solution | solution = sol1

Plots
  pg1: PlotGroup3D "Stress (solid)" | data = dset1
    vol1: Volume | expr = solid.mises
      def: Deform "Deformation" | expr = {u, v, w}; descr = Displacement field

Exports
  data1: Data
    data = dset1
    expr = {u, v, w}
    unit = {mm, mm, mm}
    descr = {"Displacement field, X component", "Displacement field, Y component", "Displacement field, Z component"}
    filename = comsoldisp10.txt
    location = file
    coordfilename = ..\coords.txt