*Heading
** Job name: Job-1 Model name: s
** Generated by: Abaqus/CAE 2022
*Preprint, echo=NO, model=NO, history=NO, contact=NO
**
** PARTS
**
*Part, name=PART-1
*Node
      1,           0.,           0.,  0.480836332
      2,  0.459755421,           0.,           1.
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*Element, type=C3D10
1666, 2525, 2533,  505,  649, 2556, 2557, 2558, 2559, 2561, 2560
1667,  591, 2527, 2526,  699, 2562, 2563, 2564, 2565, 2567, 2566
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*Elset, elset=VOLUME1, generate
 1666,  2059,     1
*Elset, elset=VOLUME2, generate
 2060,  2516,     1
*Elset, elset=VOLUME3, generate
 2517,  2856,     1
*Elset, elset=VOLUME4, generate
 2857,  3176,     1
*Elset, elset=VOLUME5, generate
 3177,  3475,     1
*Elset, elset=VOLUME6, generate
 3476,  3982,     1
*Elset, elset=VOLUME7, generate
 3983,  4319,     1
*Elset, elset=VOLUME8, generate
 4320,  4662,     1
*Elset, elset=VOLUME9, generate
 4663,  5089,     1
*Elset, elset=VOLUME10, generate
 5090,  5619,     1
** Section: Section-1-VOLUME1
*Solid Section, elset=VOLUME1, controls=EC-1,  material=U1
1.,
** Section: Section-2-VOLUME2
*Solid Section, elset=VOLUME2, controls=EC-1,  material=U2
1.,
** Section: Section-3-VOLUME3
*Solid Section, elset=VOLUME3, controls=EC-1,  material=U3
1.,
** Section: Section-4-VOLUME4
*Solid Section, elset=VOLUME4, controls=EC-1,  material=U4
1.,
** Section: Section-5-VOLUME5
*Solid Section, elset=VOLUME5, controls=EC-1,  material=U5
1.,
** Section: Section-6-VOLUME6
*Solid Section, elset=VOLUME6, controls=EC-1,  material=U6
1.,
** Section: Section-7-VOLUME7
*Solid Section, elset=VOLUME7, controls=EC-1,  material=U7
1.,
** Section: Section-8-VOLUME8
*Solid Section, elset=VOLUME8, controls=EC-1,  material=U8
1.,
** Section: Section-9-VOLUME9
*Solid Section, elset=VOLUME9, controls=EC-1,  material=U9
1.,
** Section: Section-10-VOLUME10
*Solid Section, elset=VOLUME10, controls=EC-1,  material=U10
1.,
*End Part
**
**
** ASSEMBLY
**
*Assembly, name=Assembly
**
*Instance, name=PART-1-1, part=PART-1
*End Instance
**
*Nset, nset=Set-1, instance=PART-1-1
   24,   29,   51,  209,  211,  233
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*Nset, nset=Set-2, instance=PART-1-1
    2,    8,    9,   33,   34,   36
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*Nset, nset=Set-3, instance=PART-1-1
 13,
*Nset, nset=Set-4, instance=PART-1-1
 24,
*Nset, nset=Set-5, instance=PART-1-1
   13,   14,   15,   19,   20,   22
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*End Assembly
**
** MATERIALS
**
*Material, name=U1
*Depvar
    250,
*User Material,TYPE=mechanical,constants=160
**#1
168400.,121400.,75400.,0.,0.,0.,0.,0.,
0.,0.,0.,0.,0.,0.,0.,0.,
0.,0.,0.,0.,0.,0.,0.,0.,
**#25
1.,0.,0.,0.,0.,0.,0.,0.,
1.,1.,1.,1.,1.,0.,0.,0.,
0.,0.,0.,0.,0.,0.,0.,0.,
0.,0.,0.,0.,0.,0.,0.,0.,
**#57
0.164620,0.875881,0.453579,0.752400,0.185844,-0.631946,-0.637804,0.445304,
-0.628419,0.,0.,0.,0.,0.,0.,0.,
**#73
10.,.001,541.5,109.5,60.8,0.,0.,0.,
 0.,  0.,   0.,   0.,  0.,0.,0.,0.,
 0.,  0.,   0.,   0.,  0.,0.,0.,0.,
**#97
1.,1.,0.,0.,0.,0.,0.,0.,
0.,0.,0.,0.,0.,0.,0.,0.,
0.,0.,0.,0.,0.,0.,0.,0.,
0.,0.,0.,0.,0.,0.,0.,0.,
0.,0.,0.,0.,0.,0.,0.,0.,
0.,0.,0.,0.,0.,0.,0.,0.,
**#145
.5,1.,0.,0.,0.,0.,0.,0.,
**#153
1.,10.,1.E-5,0.,0.,0.,0.,0.
*Material, name=U2
*Depvar
    250,
*User Material,TYPE=mechanical,constants=160
**#1
168400.,121400.,75400.,0.,0.,0.,0.,0.,
0.,0.,0.,0.,0.,0.,0.,0.,
0.,0.,0.,0.,0.,0.,0.,0.,
**#25
1.,0.,0.,0.,0.,0.,0.,0.,
1.,1.,1.,1.,1.,0.,0.,0.,
0.,0.,0.,0.,0.,0.,0.,0.,
0.,0.,0.,0.,0.,0.,0.,0.,
**#57
-0.236817,0.546828,-0.803055,-0.305291,-0.826582,-0.472820,-0.922342,0.133194,
0.362691,0.,0.,0.,0.,0.,0.,0.,
**#73
10.,.001,541.5,109.5,60.8,0.,0.,0.,
 0.,  0.,   0.,   0.,  0.,0.,0.,0.,
 0.,  0.,   0.,   0.,  0.,0.,0.,0.,
**#97
1.,1.,0.,0.,0.,0.,0.,0.,
0.,0.,0.,0.,0.,0.,0.,0.,
0.,0.,0.,0.,0.,0.,0.,0.,
0.,0.,0.,0.,0.,0.,0.,0.,
0.,0.,0.,0.,0.,0.,0.,0.,
0.,0.,0.,0.,0.,0.,0.,0.,
**#145
.5,1.,0.,0.,0.,0.,0.,0.,
**#153
1.,10.,1.E-5,0.,0.,0.,0.,0.
*Material, name=U3
*Depvar
    250,
*User Material,TYPE=mechanical,constants=160
**#1
168400.,121400.,75400.,0.,0.,0.,0.,0.,
0.,0.,0.,0.,0.,0.,0.,0.,
0.,0.,0.,0.,0.,0.,0.,0.,
**#25
1.,0.,0.,0.,0.,0.,0.,0.,
1.,1.,1.,1.,1.,0.,0.,0.,
0.,0.,0.,0.,0.,0.,0.,0.,
0.,0.,0.,0.,0.,0.,0.,0.,
**#57
0.309900,-0.663915,0.680573,0.840687,-0.142993,-0.522301,0.444080,0.734010,
0.513831,0.,0.,0.,0.,0.,0.,0.,
**#73
10.,.001,541.5,109.5,60.8,0.,0.,0.,
 0.,  0.,   0.,   0.,  0.,0.,0.,0.,
 0.,  0.,   0.,   0.,  0.,0.,0.,0.,
**#97
1.,1.,0.,0.,0.,0.,0.,0.,
0.,0.,0.,0.,0.,0.,0.,0.,
0.,0.,0.,0.,0.,0.,0.,0.,
0.,0.,0.,0.,0.,0.,0.,0.,
0.,0.,0.,0.,0.,0.,0.,0.,
0.,0.,0.,0.,0.,0.,0.,0.,
**#145
.5,1.,0.,0.,0.,0.,0.,0.,
**#153
1.,10.,1.E-5,0.,0.,0.,0.,0.
*Material, name=U4
*Depvar
    250,
*User Material,TYPE=mechanical,constants=160
**#1
168400.,121400.,75400.,0.,0.,0.,0.,0.,
0.,0.,0.,0.,0.,0.,0.,0.,
0.,0.,0.,0.,0.,0.,0.,0.,
**#25
1.,0.,0.,0.,0.,0.,0.,0.,
1.,1.,1.,1.,1.,0.,0.,0.,
0.,0.,0.,0.,0.,0.,0.,0.,
0.,0.,0.,0.,0.,0.,0.,0.,
**#57
-0.778658,0.041956,-0.626044,0.561143,-0.399852,-0.724732,-0.280732,-0.915619,
0.287805,0.,0.,0.,0.,0.,0.,0.,
**#73
10.,.001,541.5,109.5,60.8,0.,0.,0.,
 0.,  0.,   0.,   0.,  0.,0.,0.,0.,
 0.,  0.,   0.,   0.,  0.,0.,0.,0.,
**#97
1.,1.,0.,0.,0.,0.,0.,0.,
0.,0.,0.,0.,0.,0.,0.,0.,
0.,0.,0.,0.,0.,0.,0.,0.,
0.,0.,0.,0.,0.,0.,0.,0.,
0.,0.,0.,0.,0.,0.,0.,0.,
0.,0.,0.,0.,0.,0.,0.,0.,
**#145
.5,1.,0.,0.,0.,0.,0.,0.,
**#153
1.,10.,1.E-5,0.,0.,0.,0.,0.
*Material, name=U5
*Depvar
    250,
*User Material,TYPE=mechanical,constants=160
**#1
168400.,121400.,75400.,0.,0.,0.,0.,0.,
0.,0.,0.,0.,0.,0.,0.,0.,
0.,0.,0.,0.,0.,0.,0.,0.,
**#25
1.,0.,0.,0.,0.,0.,0.,0.,
1.,1.,1.,1.,1.,0.,0.,0.,
0.,0.,0.,0.,0.,0.,0.,0.,
0.,0.,0.,0.,0.,0.,0.,0.,
**#57
0.704090,0.702190,0.105764,0.189943,-0.329745,0.924765,0.684236,-0.631029,
-0.365546,0.,0.,0.,0.,0.,0.,0.,
**#73
10.,.001,541.5,109.5,60.8,0.,0.,0.,
 0.,  0.,   0.,   0.,  0.,0.,0.,0.,
 0.,  0.,   0.,   0.,  0.,0.,0.,0.,
**#97
1.,1.,0.,0.,0.,0.,0.,0.,
0.,0.,0.,0.,0.,0.,0.,0.,
0.,0.,0.,0.,0.,0.,0.,0.,
0.,0.,0.,0.,0.,0.,0.,0.,
0.,0.,0.,0.,0.,0.,0.,0.,
0.,0.,0.,0.,0.,0.,0.,0.,
**#145
.5,1.,0.,0.,0.,0.,0.,0.,
**#153
1.,10.,1.E-5,0.,0.,0.,0.,0.
*Material, name=U6
*Depvar
    250,
*User Material,TYPE=mechanical,constants=160
**#1
168400.,121400.,75400.,0.,0.,0.,0.,0.,
0.,0.,0.,0.,0.,0.,0.,0.,
0.,0.,0.,0.,0.,0.,0.,0.,
**#25
1.,0.,0.,0.,0.,0.,0.,0.,
1.,1.,1.,1.,1.,0.,0.,0.,
0.,0.,0.,0.,0.,0.,0.,0.,
0.,0.,0.,0.,0.,0.,0.,0.,
**#57
-0.310861,-0.399342,0.862492,0.283816,0.827047,0.485224,-0.907091,0.395626,
-0.143757,0.,0.,0.,0.,0.,0.,0.,
**#73
10.,.001,541.5,109.5,60.8,0.,0.,0.,
 0.,  0.,   0.,   0.,  0.,0.,0.,0.,
 0.,  0.,   0.,   0.,  0.,0.,0.,0.,
**#97
1.,1.,0.,0.,0.,0.,0.,0.,
0.,0.,0.,0.,0.,0.,0.,0.,
0.,0.,0.,0.,0.,0.,0.,0.,
0.,0.,0.,0.,0.,0.,0.,0.,
0.,0.,0.,0.,0.,0.,0.,0.,
0.,0.,0.,0.,0.,0.,0.,0.,
**#145
.5,1.,0.,0.,0.,0.,0.,0.,
**#153
1.,10.,1.E-5,0.,0.,0.,0.,0.
*Material, name=U7
*Depvar
    250,
*User Material,TYPE=mechanical,constants=160
**#1
168400.,121400.,75400.,0.,0.,0.,0.,0.,
0.,0.,0.,0.,0.,0.,0.,0.,
0.,0.,0.,0.,0.,0.,0.,0.,
**#25
1.,0.,0.,0.,0.,0.,0.,0.,
1.,1.,1.,1.,1.,0.,0.,0.,
0.,0.,0.,0.,0.,0.,0.,0.,
0.,0.,0.,0.,0.,0.,0.,0.,
**#57
0.242481,-0.939348,-0.242544,0.403288,-0.129784,0.905823,-0.882362,-0.317460,
0.347357,0.,0.,0.,0.,0.,0.,0.,
**#73
10.,.001,541.5,109.5,60.8,0.,0.,0.,
 0.,  0.,   0.,   0.,  0.,0.,0.,0.,
 0.,  0.,   0.,   0.,  0.,0.,0.,0.,
**#97
1.,1.,0.,0.,0.,0.,0.,0.,
0.,0.,0.,0.,0.,0.,0.,0.,
0.,0.,0.,0.,0.,0.,0.,0.,
0.,0.,0.,0.,0.,0.,0.,0.,
0.,0.,0.,0.,0.,0.,0.,0.,
0.,0.,0.,0.,0.,0.,0.,0.,
**#145
.5,1.,0.,0.,0.,0.,0.,0.,
**#153
1.,10.,1.E-5,0.,0.,0.,0.,0.
*Material, name=U8
*Depvar
    250,
*User Material,TYPE=mechanical,constants=160
**#1
168400.,121400.,75400.,0.,0.,0.,0.,0.,
0.,0.,0.,0.,0.,0.,0.,0.,
0.,0.,0.,0.,0.,0.,0.,0.,
**#25
1.,0.,0.,0.,0.,0.,0.,0.,
1.,1.,1.,1.,1.,0.,0.,0.,
0.,0.,0.,0.,0.,0.,0.,0.,
0.,0.,0.,0.,0.,0.,0.,0.,
**#57
0.040781,0.641937,-0.765672,-0.898837,0.358252,0.252484,0.436382,0.677917,
0.591607,0.,0.,0.,0.,0.,0.,0.,
**#73
10.,.001,541.5,109.5,60.8,0.,0.,0.,
 0.,  0.,   0.,   0.,  0.,0.,0.,0.,
 0.,  0.,   0.,   0.,  0.,0.,0.,0.,
**#97
1.,1.,0.,0.,0.,0.,0.,0.,
0.,0.,0.,0.,0.,0.,0.,0.,
0.,0.,0.,0.,0.,0.,0.,0.,
0.,0.,0.,0.,0.,0.,0.,0.,
0.,0.,0.,0.,0.,0.,0.,0.,
0.,0.,0.,0.,0.,0.,0.,0.,
**#145
.5,1.,0.,0.,0.,0.,0.,0.,
**#153
1.,10.,1.E-5,0.,0.,0.,0.,0.
*Material, name=U9
*Depvar
    250,
*User Material,TYPE=mechanical,constants=160
**#1
168400.,121400.,75400.,0.,0.,0.,0.,0.,
0.,0.,0.,0.,0.,0.,0.,0.,
0.,0.,0.,0.,0.,0.,0.,0.,
**#25
1.,0.,0.,0.,0.,0.,0.,0.,
1.,1.,1.,1.,1.,0.,0.,0.,
0.,0.,0.,0.,0.,0.,0.,0.,
0.,0.,0.,0.,0.,0.,0.,0.,
**#57
0.412387,0.574738,-0.706833,0.475154,0.526292,0.705156,0.777281,-0.626652,
-0.056053,0.,0.,0.,0.,0.,0.,0.,
**#73
10.,.001,541.5,109.5,60.8,0.,0.,0.,
 0.,  0.,   0.,   0.,  0.,0.,0.,0.,
 0.,  0.,   0.,   0.,  0.,0.,0.,0.,
**#97
1.,1.,0.,0.,0.,0.,0.,0.,
0.,0.,0.,0.,0.,0.,0.,0.,
0.,0.,0.,0.,0.,0.,0.,0.,
0.,0.,0.,0.,0.,0.,0.,0.,
0.,0.,0.,0.,0.,0.,0.,0.,
0.,0.,0.,0.,0.,0.,0.,0.,
**#145
.5,1.,0.,0.,0.,0.,0.,0.,
**#153
1.,10.,1.E-5,0.,0.,0.,0.,0.
*Material, name=U10
*Depvar
    250,
*User Material,TYPE=mechanical,constants=160
**#1
168400.,121400.,75400.,0.,0.,0.,0.,0.,
0.,0.,0.,0.,0.,0.,0.,0.,
0.,0.,0.,0.,0.,0.,0.,0.,
**#25
1.,0.,0.,0.,0.,0.,0.,0.,
1.,1.,1.,1.,1.,0.,0.,0.,
0.,0.,0.,0.,0.,0.,0.,0.,
0.,0.,0.,0.,0.,0.,0.,0.,
**#57
0.694264,0.703808,-0.150505,0.548111,-0.652561,-0.523201,-0.466446,0.280746,
-0.838814,0.,0.,0.,0.,0.,0.,0.,
**#73
10.,.001,541.5,109.5,60.8,0.,0.,0.,
 0.,  0.,   0.,   0.,  0.,0.,0.,0.,
 0.,  0.,   0.,   0.,  0.,0.,0.,0.,
**#97
1.,1.,0.,0.,0.,0.,0.,0.,
0.,0.,0.,0.,0.,0.,0.,0.,
0.,0.,0.,0.,0.,0.,0.,0.,
0.,0.,0.,0.,0.,0.,0.,0.,
0.,0.,0.,0.,0.,0.,0.,0.,
0.,0.,0.,0.,0.,0.,0.,0.,
**#145
.5,1.,0.,0.,0.,0.,0.,0.,
**#153
1.,10.,1.E-5,0.,0.,0.,0.,0.
** ----------------------------------------------------------------
*Section Controls, name=EC-1, DISTORTION CONTROL=NO, ELEMENT DELETION=NO
1., 1., 1., 0., 0.
** STEP: Step-1
**
*Step, name=Step-1, nlgeom=YES, inc=50000, unsymm=YES
*Static
0.01, 0.4, 0.01, 0.01
**
** BOUNDARY CONDITIONS
**
** Name: BC-2 Type: Displacement/Rotation
*Boundary
Set-2, 3, 3, 0.04
** Name: BC-3 Type: Displacement/Rotation
*Boundary
Set-3, 1, 1
Set-3, 2, 2
** Name: BC-4 Type: Displacement/Rotation
*Boundary
Set-4, 1, 1
** Name: BC-5 Type: Displacement/Rotation
*Boundary
Set-5, 3, 3
**
** CONTROLS
**
**Controls, reset
**Controls, parameters=field
**1e-20,,,,5e-3,,,1e-20
**Controls, parameters=time incrementation
**,,5,,,,,,,,
**
** OUTPUT REQUESTS
**
*Restart, write, frequency=0
**
** FIELD OUTPUT: F-Output-2
**
*Output, field
*Node Output
COORD,
*Element Output, directions=YES
SDV,
**
** FIELD OUTPUT: F-Output-1
**
*Output, field, variable=PRESELECT
*Output, history, frequency=0
*End Step
