// COMSOL Multiphysics 6.0.0.354 model "holed_plate.mph"
// Elastic Holed Plate
// Outline of the model tree

Parameters
  para = 0[Pa]  // Horizontal load parameter

Geometry
  geom1 "Geometry 1" (2D, length unit mm)
    r1: Rectangle | size = {18, 10}
    c1: Circle | r = 5
    dif1: Difference | input = r1; input2 = c1
    fin: Finalize "Form Union"

Materials
  extmat1: External "umat_lin"
    def "Basic"
      density = 7850
    comcomsolgeneralStressStrain "General stress-strain relation"
      par = {70e9, 0.2}

Physics
  solid: SolidMechanics on all domains
    dependent variable u = {u, v, w}
    Type2D.Type2D = PlaneStress
    d.d = 10[mm]
    StructuralTransientBehavior.StructuralTransientBehavior = Quasistatic
    lemm1: LinearElasticModel "Linear Elastic Material 1" (default)
      E_mat = userdef
      E = 0
      nu_mat = userdef
      nu = 0
      rho_mat = userdef
      rho = 0
    free1: Free (default)
    init1: init "Initial Values 1" (default)
    sym1: SymmetrySolid "Symmetry 1" on boundaries 1, 3
    bndl1: BoundaryLoad on boundaries 4 | FperArea = {para, 0, 0}
    essr1: ExternalStressStrainRelation on domains 1 | ForceLinearStrainRes = 1; material = extmat1

Mesh
  mesh1 "Mesh 1"
    size: MeshSizeDefault | hmax = 1.21; hmin = 0.0054; hcurve = 0.3; hgrad = 1.3
    ftri1: FreeTri "Free Triangular 1" on remaining entities
    ref1: Refine on entire geometry | boxcoord = on; xmax = 8; ymax = 10

Studies
  std1 "Linear Ramp"
    stat: Stationary
      useinitsol = on
      usesol = on
      useparam = on
      pname = para
      plistarr = range(0,133.65e6,133.65e6)
      punit = Pa

Solver configurations
  sol1 "Solution 1" (study std1)
    v1: Variables "Dependent Variables 1" | scalemethod = none; resscalemethod = manual; initparametersmethod = manual
    s1: Stationary "Stationary Solver 1" | stol = 0.005; nonlin = on
      dDef: Direct
      p1: Parametric
        paramtuning = on
        pinitstep = 133.65e6/22
        pminstep = 133.65e6/22
        pmaxstep = 133.65e6/22
        porder = linear
        pout = psteps
      fc1: FullyCoupled | linsolver = dDef; dtech = const; termonres = on